// SBML level 2 version 4

model NCT()
  // NCT

  // Compartments:
  compartment cell = 3 MWBUILTINPREFIX_pico_MWBUILTINUNIT_liter;

  // Species:
  // Set by (Eq.5)
  species RanGTP_nuc in cell = 0;  // substance in mole
  // Set by (Eq.3)
  species RanGTP_RanBP1 in cell = 0; RanGTP_RanBP1 is "RanGTP--RanBP1";  // substance in mole
  // Set by (Eq.2)
  species RanGTP_cyto in cell = 0;  // substance in mole
  // Set by (Eq.1) Initial condition: 5 uM from Table II
  species RanGDP_cyto in cell = 5e-12;  // substance in mole
  // Set by (Eq.6)
  species IntA in cell = 0;  // substance in mole
  // Set by (Eq.7)
  species IntB in cell = 0;  // substance in mole
  // Set by (Eq.8)
  species IntC in cell = 0;  // substance in mole
  // Constrained by Eq.10
  species RanBP1 in cell;  // substance in mole
  // Free RCC1 enzyme (cf. Fig.1) Constrained by Eq.9
  species E in cell;  // substance in mole
  // Set by (Eq.4)
  species RanGDP_nuc in cell = 0;  // substance in mole
  species Total_cyto_RanGTP in cell;  // substance in mole
  // GSR 2003 Fig 6 0.5 uM RM 2005 Table I 3 uM (citing Ribbeck et al 1998) We take 1uM for simplicity
  species ImpB_cyto in cell = 1e-12;  // substance in mole
  species ImpB_RanGTP_cyto in cell = 0; ImpB_RanGTP_cyto is "ImpB--RanGTP cyto";  // substance in mole
  // GSR 2020 Fig 6 RM 2005 Fig 2: 3uM
  species Cargo_cyto in cell = 3e-12;  // substance in mole
  // Matlab doesn't let me set this to zero.
  species ImpB_Cargo_cyto_cell_16 in cell = 0; ImpB_Cargo_cyto_cell_16 is "ImpB--Cargo cyto";  // substance in mole
  species ImpB_RanGTP_nuc in cell = 0; ImpB_RanGTP_nuc is "ImpB--RanGTP nuc";  // substance in mole
  species ImpB_nuc in cell = 0;  // substance in mole
  species ImpB_Cargo_nuc_cell_19 in cell = 0; ImpB_Cargo_nuc_cell_19 is "ImpB--Cargo nuc";  // substance in mole
  species Cargo_nuc in cell = 0;  // substance in mole
  species ImpB_Cargo_cyto_cell_21 in cell = 0; ImpB_Cargo_cyto_cell_21 is "ImpB*--Cargo cyto";  // substance in mole
  species ImpB_Cargo_nuc_cell_22 in cell = 0; ImpB_Cargo_nuc_cell_22 is "ImpB*--Cargo nuc";  // substance in mole
  species Total_nuc_ImpB in cell; Total_nuc_ImpB is "Total cyto ImpB";  // substance in mole
  species Total_nuc_ImpB in cell;  // substance in mole
  species Total_nuc_Cargo in cell; Total_nuc_Cargo is "Total cyto Cargo";  // substance in mole
  species Total_nuc_Cargo in cell;  // substance in mole
  species Consumed_nuclear_cargo in cell = 0;  // substance in mole

  // Parameters:
  // Set by (Eq.11)
  FluxRanGTP has MWDERIVEDUNIT_micromolarity__second;
  FluxRanGDP has MWDERIVEDUNIT_micromolarity__second;
  // Used in (Eq.9) 0.7 uM in Fig.4 0.7 uM in ST B (nuclear) 0.25 uM in ST B (HeLa cells)
  RCC1_total = 0.7 MWBUILTINPREFIX_micro_MWBUILTINUNIT_molarity;
  // Defined in Fig.4
  V_nuc = 1.2 MWBUILTINPREFIX_pico_MWBUILTINUNIT_liter;
  // Defined in Fig.4
  V_cyto = 1.8 MWBUILTINPREFIX_pico_MWBUILTINUNIT_liter;
  // 0.7 uM in Fig.4 0.7 uM in ST B (cytoplasmic) 0.4 uM in ST B (HeLa cells)
  RanGAP = 0.7 MWBUILTINPREFIX_micro_MWBUILTINUNIT_molarity;
  // 2 uM in Fig.4 2 uM in ST B (cytoplasmic) 1.1 uM in ST B (HeLa cells)
  RanBP1_total = 2 MWBUILTINPREFIX_micro_MWBUILTINUNIT_molarity;
  // Cellular NTF2 concentration (homodimers) 0.3 uM in Fig.4 0.3 uM in ST B
  NTF2 = 0.3 MWBUILTINPREFIX_micro_MWBUILTINUNIT_molarity;
  // Cellular Ran concentration: 3 uM in Fig.4 6 uM in ST B
  Ran = 3 MWBUILTINPREFIX_micro_MWBUILTINUNIT_molarity;
  // Set by (Eq.13)
  GAP_RanBP1 has MWDERIVEDUNIT_micromolarity__second;
  // Set by (Eq.13)
  GAP has MWDERIVEDUNIT_micromolarity__second;
  // aka dynamic capacity Table II p.5: The effects were assessed not only by the criteria of nuclear and cytoplasmic steady-state levels of RanGTP; we also considered that transport at the expense of the Ran gradient depletes the nuclear RanGTP pool. Therefore, it is an important criterion which level of work load or `exercise' the system can sustain. This number reflects the maximum rate of nuclear RanGTP production (in mM/sec), and we refer to it here as the dynamic capacity for Ran-driven transport.
  Exercise = 0 MWDERIVEDUNIT_micromolarity__second;
  // In Fig.3: 0.48/s = permeability factor for NTF2--RanGDP Table II: 0.12/s corresponds to 0.3 uM NTF2 dimers
  kPerm_RanGDP = 0.12 MWDERIVEDUNIT_1__second;
  // From Fig.3 Don't delete (might be used in a script)
  kPerm_NTF2_RanGDP = 0.48 MWDERIVEDUNIT_1__second; kPerm_NTF2_RanGDP is "kPerm_NTF2--RanGDP";
  // Analogous to kPerm_RanGDP
  kPerm_RanGTP = 0.03 MWDERIVEDUNIT_1__second;
  // From Supp Table A: 4.0E-4 1/second
  k_off = 0.0004 MWDERIVEDUNIT_1__second;
  // From Supp Table A
  k_on = 0.3 MWDERIVEDUNIT_1__micromolarity_second;
  // Supp Table A
  r1 = 74 MWDERIVEDUNIT_1__micromolarity_second;
  // Supp Table A
  r8 = 55 MWDERIVEDUNIT_1__second;
  // Supp Table A
  r4 = 55 MWDERIVEDUNIT_1__second;
  // Supp Table A
  r5 = 100 MWDERIVEDUNIT_1__micromolarity_second;
  // p.6 / Table II
  GTP = 500 MWBUILTINPREFIX_micro_MWBUILTINUNIT_molarity;
  // p.6 / Table II: 1.6 uM
  GDP = 1.6 MWBUILTINPREFIX_micro_MWBUILTINUNIT_molarity;
  // Supp Table A
  r3 = 0.6 MWDERIVEDUNIT_1__micromolarity_second;
  // Supp Table A
  r6 = 19 MWDERIVEDUNIT_1__second;
  // Supp Table A
  r2 = 21 MWDERIVEDUNIT_1__second;
  // Supp Table A
  r7 = 11 MWDERIVEDUNIT_1__micromolarity_second;
  // Supp Table A: 0.7 uM
  K_M_13 = 0.7 MWBUILTINPREFIX_micro_MWBUILTINUNIT_molarity;
  // Supp Table A: 10.6 (1/second)
  k_cat_13 = 10.6 MWDERIVEDUNIT_1__second;
  // Supp Table A: 0.1 uM
  K_M_14 = 0.1 MWBUILTINPREFIX_micro_MWBUILTINUNIT_molarity;
  // Supp Table A: 10.8 (1/second)
  k_cat_14 = 10.8 MWDERIVEDUNIT_1__second;
  // free nuclear cargo / free cytoplasmic cargo
  GSR_CargoRatio has dimensionless; GSR_CargoRatio is "GSR -- CargoRatio";
  // K_D from Supp Table A Dissociation constant from RanGTP--ImpBeta, see Eq (16)
  K_R = 0.0005 MWBUILTINPREFIX_micro_MWBUILTINUNIT_molarity;
  // helper constant to equilibrate "Exercise" such that RanGTP_nuc = 0
  k_ex = 10 MWDERIVEDUNIT_1__second___2;
  // Dissociation of ImpB--RanGTP
  ImpB_GAP has MWDERIVEDUNIT_micromolarity__second; ImpB_GAP is "R cyto";
  F_ImpB_RanGTP has MWDERIVEDUNIT_micromolarity__second; F_ImpB_RanGTP is "F ImpB--RanGTP";
  // Dissociation of ImpB--Cargo
  C_cyto has MWDERIVEDUNIT_micromolarity__second;
  F_ImpB has MWDERIVEDUNIT_micromolarity__second;
  F_ImpB_Cargo has MWDERIVEDUNIT_micromolarity__second; F_ImpB_Cargo is "F ImpB--Cargo";
  F_Cargo has MWDERIVEDUNIT_micromolarity__second;
  // GSR 2003 Supp Table A "upper limit" 4.8e-6 RM 2005 Table II 4.8e-6
  k_R_off = 4.8e-6 MWDERIVEDUNIT_1__second;
  // GSR 2003 Supp Table A "upper limit" 9.6e4 1/M/s = 0.096 1/uM/s RM 2005 Table II 9.6e4
  k_R_on = 0.096 MWDERIVEDUNIT_1__micromolarity_second;
  // RM 2005 Table II 0.017 1/s
  k_C1_off = 0.00072 MWDERIVEDUNIT_1__second;
  // RM 2005 Table II 4.9e5 1/uM/s Typo! Catimel 2001 under Fig 3 4.9e5 1/M/s = 0.49 1/uM/s (For ImpB -- ImpA)
  k_C1_on = 0.11 MWDERIVEDUNIT_1__micromolarity__second;
  // Dissociation of ImpB--RanGTP
  R_nuc has MWDERIVEDUNIT_micromolarity__second;
  // Dissociation of ImpB--Cargo
  C_nuc has MWDERIVEDUNIT_micromolarity__second;
  // a guess
  k_perm_ImpB_RanGTP = 0.07 MWDERIVEDUNIT_1__second; k_perm_ImpB_RanGTP is "k_perm ImpB--RanGTP";
  // a guess
  k_perm_ImpB = 0.4 MWDERIVEDUNIT_1__second;
  // Text to the right of Eqn (16)
  k_perm_ImpB_Cargo = 0.25 MWDERIVEDUNIT_1__second; k_perm_ImpB_Cargo is "k_perm ImpB--Cargo";
  // Text to the right of Eqn (16)
  k_perm_Cargo = 0.0005 MWDERIVEDUNIT_1__second;
  // RM 2005 Table II 2.5e-4 1/second
  k_C2_off = 0.00025 MWDERIVEDUNIT_1__second;
  // RM 2005 Table II 7900 1/uM/s
  k_C2_on = 7900 MWDERIVEDUNIT_1__micromolarity__second;
  Cargo_consumption_coeff = 0.1 MWDERIVEDUNIT_1__second;
  Nuclear_free_cargo_consumption = 0 MWDERIVEDUNIT_micromolarity__second;
  // Dissociation of ImpB--RanGTP by RanGAP into ImpB, RanGDP and Pi
  ImpB_GAP has MWDERIVEDUNIT_micromolarity__second;
  Nuc_RanGDP_to_RanGTP_conversion has MWDERIVEDUNIT_micromolarity__second;
  // Rate of formation of the complex
  F_RanGTP_RanBP1 has MWDERIVEDUNIT_micromolarity__second; F_RanGTP_RanBP1 is "F RanGTP--RanBP1";
  // Flux of ImpB--Cargo + RanGTP <=> ImpB--RanGTP + Cargo (all nuc)
  Cargo_knock_off_cyto has MWDERIVEDUNIT_micromolarity__second; Cargo_knock_off_cyto is "Cargo knock-off nuc";
  // Estimate from Table II of RM 2005
  k_knockoff = 0.02 MWDERIVEDUNIT_1__micromolarity__second;
  // Flux of ImpB--Cargo + RanGTP <=> ImpB--RanGTP + Cargo (all CYTO)
  Cargo_knock_off_cyto has MWDERIVEDUNIT_micromolarity__second; Cargo_knock_off_cyto is "Cargo knock-off cyto";
  Free_cargo_Ratio has dimensionless;

  // Assignment rules:
  FluxRanGTP := kPerm_RanGTP*(RanGTP_nuc - RanGTP_cyto);
  FluxRanGDP := kPerm_RanGDP*(RanGDP_nuc - RanGDP_cyto);
  E := RCC1_total - (IntA + IntB + IntC);
  RanBP1 := RanBP1_total - RanGTP_RanBP1;
  GAP := k_cat_13*RanGAP*RanGTP_cyto/(RanGTP_cyto + K_M_13);
  GAP_RanBP1 := k_cat_14*RanGAP*RanGTP_RanBP1/(RanGTP_RanBP1 + K_M_14);
  Total_cyto_RanGTP := RanGTP_cyto + RanGTP_RanBP1;
  GSR_CargoRatio := (K_R + RanGTP_nuc)/(K_R + Total_cyto_RanGTP);
  // Dissociation of ImpB--RanGTP
  ImpB_GAP := -k_R_on*ImpB_cyto*RanGTP_cyto + k_R_off*ImpB_RanGTP_cyto;
  // Dissociation of ImpB--Cargo
  C_cyto := -k_C1_on*ImpB_cyto*Cargo_cyto + k_C1_off*ImpB_Cargo_cyto_cell_16;
  // Dissociation of ImpB--RanGTP
  R_nuc := -k_R_on*ImpB_nuc*RanGTP_nuc + k_R_off*ImpB_RanGTP_nuc;
  // Dissociation of ImpB--Cargo
  C_nuc := -k_C1_on*ImpB_nuc*Cargo_nuc + k_C1_off*ImpB_Cargo_nuc_cell_19;
  // RM 2005 Table III 0.07 1/s
  F_ImpB_RanGTP := k_perm_ImpB_RanGTP*(ImpB_RanGTP_nuc - ImpB_RanGTP_cyto);
  // RM 2005 Table III 0.4 1/s
  F_ImpB := k_perm_ImpB*(ImpB_nuc - ImpB_cyto);
  // RM 2005 Table III 0.25 1/s
  F_ImpB_Cargo := k_perm_ImpB_Cargo*(ImpB_Cargo_nuc_cell_19 - ImpB_Cargo_cyto_cell_16);
  // A guess Cf. GGNLS in RM 2005 Table III 0.5e-3 1/s
  F_Cargo := k_perm_Cargo*(Cargo_nuc - Cargo_cyto);
  Total_nuc_ImpB := ImpB_cyto + ImpB_RanGTP_cyto + ImpB_Cargo_cyto_cell_16 + ImpB_Cargo_cyto_cell_21;
  Total_nuc_ImpB := ImpB_nuc + ImpB_RanGTP_nuc + ImpB_Cargo_nuc_cell_19 + ImpB_Cargo_nuc_cell_22;
  Total_nuc_Cargo := Cargo_cyto + ImpB_Cargo_cyto_cell_16 + ImpB_Cargo_cyto_cell_21;
  Total_nuc_Cargo := Cargo_nuc + ImpB_Cargo_nuc_cell_19 + ImpB_Cargo_nuc_cell_22;
  // Dissociation of ImpB--RanGTP by RanGAP
  ImpB_GAP := k_cat_13*RanGAP*ImpB_RanGTP_cyto/(ImpB_RanGTP_cyto + K_M_13);
  // 1/2 of (outgoing on one end + incoming on the other)
  Nuc_RanGDP_to_RanGTP_conversion := 0.5*(-(r8*IntC - r1*E*RanGDP_nuc) + (r4*IntA - r5*E*RanGTP_nuc));
  F_RanGTP_RanBP1 := k_on*RanBP1*RanGTP_cyto - k_off*RanGTP_RanBP1;
  // Using the estimate from Table II of RM 2005
  Cargo_knock_off_cyto := k_knockoff*ImpB_Cargo_nuc_cell_19*RanGTP_nuc;
  // Using the estimate from Table II of RM 2005
  Cargo_knock_off_cyto := k_knockoff*ImpB_Cargo_cyto_cell_16*RanGTP_cyto;
  Free_cargo_Ratio := Cargo_nuc/Cargo_cyto;

  // Rate rules:
  RanGDP_cyto' = FluxRanGDP*(V_nuc/V_cyto) + GAP + GAP_RanBP1 + Exercise*(V_nuc/V_cyto) + ImpB_GAP;
  RanGTP_cyto' = FluxRanGTP*(V_nuc/V_cyto) - GAP - F_RanGTP_RanBP1 + ImpB_GAP - Cargo_knock_off_cyto;
  RanGTP_RanBP1' = -GAP_RanBP1 + F_RanGTP_RanBP1;
  RanGDP_nuc' = -FluxRanGDP + r8*IntC - r1*E*RanGDP_nuc;
  RanGTP_nuc' = -FluxRanGTP - Exercise + r4*IntA - r5*E*RanGTP_nuc + R_nuc - Cargo_knock_off_cyto;
  IntA' = r5*E*RanGTP_nuc + r3*GTP*IntB - (r4 + r6)*IntA;
  IntB' = r6*IntA + r2*IntC - (r3*GTP + r7*GDP)*IntB;
  IntC' = r7*GDP*IntB + r1*E*RanGDP_nuc - (r2 + r8)*IntC;
  ImpB_RanGTP_cyto' = -ImpB_GAP + F_ImpB_RanGTP*(V_nuc/V_cyto) - ImpB_GAP + Cargo_knock_off_cyto;
  // This is a troublemaker. Requires high tolerance to resolve the equation loop when cytoplasmic cargo is large.
  Cargo_cyto' = C_cyto + F_Cargo*(V_nuc/V_cyto) + Cargo_knock_off_cyto;
  ImpB_cyto' = ImpB_GAP + C_cyto + F_ImpB*(V_nuc/V_cyto) + ImpB_GAP;
  ImpB_Cargo_cyto_cell_16' = -C_cyto + F_ImpB_Cargo*(V_nuc/V_cyto) - Cargo_knock_off_cyto;
  ImpB_RanGTP_nuc' = -R_nuc - F_ImpB_RanGTP + Cargo_knock_off_cyto;
  ImpB_nuc' = R_nuc + C_nuc - F_ImpB;
  ImpB_Cargo_nuc_cell_19' = -C_nuc - F_ImpB_Cargo - Cargo_knock_off_cyto;
  Cargo_nuc' = C_nuc - F_Cargo - Nuclear_free_cargo_consumption + Cargo_knock_off_cyto;

  // Unit definitions:
  unit MWBUILTINPREFIX_pico_MWBUILTINUNIT_liter = metre^3 * 1e-15 dimensionless; MWBUILTINPREFIX_pico_MWBUILTINUNIT_liter is "picoliter";
  unit MWBUILTINUNIT_liter = metre^3 * 1e-3 dimensionless;
  unit MWDERIVEDUNIT_micromolarity__second = mole * 1e-3 dimensionless / (metre^3 * second); MWDERIVEDUNIT_micromolarity__second is "micromolarity/second";
  unit MWBUILTINPREFIX_micro_MWBUILTINUNIT_molarity = mole * 1e-3 dimensionless / metre^3; MWBUILTINPREFIX_micro_MWBUILTINUNIT_molarity is "micromolarity";
  unit MWDERIVEDUNIT_1__second = dimensionless / second; MWDERIVEDUNIT_1__second is "1/second";
  unit MWDERIVEDUNIT_1__micromolarity_second = metre^3 * 1000 dimensionless / (mole * second); MWDERIVEDUNIT_1__micromolarity_second is "1/(micromolarity*second)";
  unit MWDERIVEDUNIT_1__second___2 = dimensionless / second^2; MWDERIVEDUNIT_1__second___2 is "1/second^2";
  unit MWDERIVEDUNIT_1__micromolarity__second = metre^3 * 1000 dimensionless / (mole * second); MWDERIVEDUNIT_1__micromolarity__second is "1/micromolarity/second";
end
