// SBML level 2 version 4

model Conveyor()
  // Conveyor

  // Compartments:
  compartment cytoplasm = 1.8 MWBUILTINPREFIX_pico_MWBUILTINUNIT_liter;
  compartment nucleus = 1.2 MWBUILTINPREFIX_pico_MWBUILTINUNIT_liter;
  compartment envelope = 1 MWBUILTINPREFIX_pico_MWBUILTINUNIT_liter;

  // Species:
  species Cargo_ImpB_c in cytoplasm = 0; Cargo_ImpB_c is "Cargo·ImpB";  // substance in mole
  species Cargo_c in cytoplasm = 1e-12;  // substance in mole
  species ImpB_c in cytoplasm = 5e-13;  // substance in mole
  species Cargo_ImpB_n in nucleus = 0; Cargo_ImpB_n is "Cargo·ImpB";  // substance in mole
  species Cargo_c in nucleus = 0;  // substance in mole
  species ImpB_n in nucleus = 5e-13;  // substance in mole
  species ImpB_NPC in envelope = 0; ImpB_NPC is "ImpB·NPC";  // substance in mole
  species Vacant_NPC in envelope = 1e-12;  // substance in mole
  species Cargo_ImpB_NPC in envelope = 0; Cargo_ImpB_NPC is "Cargo·ImpB·NPC";  // substance in mole
  species RanGTP_ImpB_NPC in envelope = 0; RanGTP_ImpB_NPC is "RanGTP·ImpB·NPC";  // substance in mole
  species Cargo_ImpB_n in envelope = 0; Cargo_ImpB_n is "Cargo·ImpB(n)";  // substance in mole
  species Cargo_c in envelope = 0; Cargo_c is "Cargo(n)";  // substance in mole
  species ImpB_n in envelope = 0; ImpB_n is "ImpB(n)";  // substance in mole
  species RanGTP_n in envelope = 3e-12; RanGTP_n is "RanGTP(n)";  // substance in mole
  species Cargo_ImpB_c in envelope = 0; Cargo_ImpB_c is "Cargo·ImpB(c)";  // substance in mole
  species Cargo_c in envelope = 0; Cargo_c is "Cargo(c)";  // substance in mole
  species ImpB_c in envelope = 0; ImpB_c is "ImpB(c)";  // substance in mole
  species $RanGDP_c in envelope = 2e-12; RanGDP_c is "RanGDP(c)";  // substance in mole

  // Parameters:
  k_on = 0.001 MWDERIVEDUNIT_1__micromolarity__second;
  k_off = 0.0001 MWDERIVEDUNIT_1__second;
  // Catimel et al 2001, Table I, k_a1 = 0.11e6 / Ms
  k_C_on = 0.11 MWDERIVEDUNIT_1__micromolarity__second;
  // Catimel et al 2001, Table I, k_d1
  k_C_off = 0.00074 MWDERIVEDUNIT_1__second;
  knockoff = 0.02 MWDERIVEDUNIT_1__micromolarity__second;
  V_GAP = 7 MWDERIVEDUNIT_micromolarity__second;
  K_M_14 = 0.1 MWBUILTINPREFIX_micro_MWBUILTINUNIT_molarity;
  k_perm_c = 1 MWDERIVEDUNIT_1__second; k_perm_c is "k_perm(c)";
  k_perm_n = 1 MWDERIVEDUNIT_1__second; k_perm_n is "k_perm(n)";
  kf = 1;
  kr = 1;
  // Catimel et al 2001, Table I
  k_a2 = 0.024 MWDERIVEDUNIT_1__second;
  // Catimel et al 2001, Table I
  k_d2 = 0.00074 MWDERIVEDUNIT_1__second;

  // Reactions:
  ImpB_NPC_c: ImpB_n + Vacant_NPC -> ImpB_NPC; (k_on*ImpB_n*Vacant_NPC - k_off*ImpB_NPC)*envelope; ImpB_NPC_c is "ImpB + NPC (n)";
  ImpB_NPC_c: ImpB_c + Vacant_NPC -> ImpB_NPC; (k_on*ImpB_c*Vacant_NPC - k_off*ImpB_NPC)*envelope; ImpB_NPC_c is "ImpB + NPC (c)";
  Reaction_2_1: Cargo_ImpB_c + Vacant_NPC -> Cargo_ImpB_NPC; (k_on*Cargo_ImpB_c*Vacant_NPC - k_off*Cargo_ImpB_NPC)*envelope;
  Reaction_2_1: Cargo_ImpB_n + Vacant_NPC -> Cargo_ImpB_NPC; (k_on*Cargo_ImpB_n*Vacant_NPC - k_off*Cargo_ImpB_NPC)*envelope;
  Reaction_3_1: Cargo_c + ImpB_NPC -> Cargo_ImpB_NPC; (k_C_on*Cargo_c*ImpB_NPC - k_C_off*Cargo_ImpB_NPC)*envelope;
  Reaction_3_1: Cargo_c + ImpB_NPC -> Cargo_ImpB_NPC; (k_C_on*Cargo_c*ImpB_NPC - k_C_off*Cargo_ImpB_NPC)*envelope;
  // V_GAP estimated as [0.7uM of RanGAP] x [10.6/second k_cat] K_M_14 is from GSR Eq.14
  Hydrolysis: RanGTP_ImpB_NPC + $RanGDP_c => ImpB_NPC + $RanGDP_c; V_GAP*RanGTP_ImpB_NPC/(K_M_14 + RanGTP_ImpB_NPC)*envelope;
  Knockoff: Cargo_ImpB_NPC + RanGTP_n => RanGTP_ImpB_NPC + Cargo_c + RanGTP_n; knockoff*Cargo_ImpB_NPC*RanGTP_n*envelope;
  // When the kinetic law is "unknown", Matlab appears to use /concentration/ rather than /amount/ for this equation -- concentrations equilibrate. Setting it to Michaelis--Menten breaks the simulation and the permeability constants have to be corrected.
  Reaction_1_1_1_2: Cargo_ImpB_c -> Cargo_ImpB_c; k_perm_c*(Cargo_ImpB_c - Cargo_ImpB_c)*cytoplasm; Reaction_1_1_1_2 is "Diffusion";
  Reaction_1_1_1_2: Cargo_c -> Cargo_c; k_perm_c*(Cargo_c - Cargo_c)*cytoplasm;
  Reaction_1_1_1_2: ImpB_c -> ImpB_c; k_perm_c*(ImpB_c - ImpB_c)*cytoplasm;
  Reaction_1_1_1_2: Cargo_ImpB_n -> Cargo_ImpB_n; k_perm_n*(Cargo_ImpB_n - Cargo_ImpB_n)*nucleus; Reaction_1_1_1_2 is "Reaction_1_2";
  Reaction_1_1_1_2: Cargo_c -> Cargo_c; k_perm_n*(Cargo_c - Cargo_c)*nucleus; Reaction_1_1_1_2 is "Reaction_1_1_2";
  Reaction_1_1_1_2: ImpB_n -> ImpB_n; k_perm_n*(ImpB_n - ImpB_n)*nucleus;
  Loading_1: Cargo_c + ImpB_c -> Cargo_ImpB_c; (k_C_on*Cargo_c*ImpB_c - k_C_off*Cargo_ImpB_c)*cytoplasm;
  Loading_1: Cargo_c + ImpB_n -> Cargo_ImpB_n; k_C_on*Cargo_c*ImpB_n*nucleus - k_C_off*Cargo_ImpB_n*nucleus;
  Reaction_1: => ; kf;

  // Unit definitions:
  unit MWBUILTINPREFIX_pico_MWBUILTINUNIT_liter = metre^3 * 1e-15 dimensionless; MWBUILTINPREFIX_pico_MWBUILTINUNIT_liter is "picoliter";
  unit MWBUILTINUNIT_liter = metre^3 * 1e-3 dimensionless;
  unit MWDERIVEDUNIT_1__micromolarity__second = metre^3 * 1000 dimensionless / (mole * second); MWDERIVEDUNIT_1__micromolarity__second is "1/micromolarity/second";
  unit MWDERIVEDUNIT_1__second = dimensionless / second; MWDERIVEDUNIT_1__second is "1/second";
  unit MWDERIVEDUNIT_micromolarity__second = mole * 1e-3 dimensionless / (metre^3 * second); MWDERIVEDUNIT_micromolarity__second is "micromolarity/second";
  unit MWBUILTINPREFIX_micro_MWBUILTINUNIT_molarity = mole * 1e-3 dimensionless / metre^3; MWBUILTINPREFIX_micro_MWBUILTINUNIT_molarity is "micromolarity";
end
