// SBML level 2 version 4

model RanGAP_sequence__vs__GSR()
  // RanGAP_sequence__vs__GSR

  // Compartments:
  // SKFKWV-2003 (Seewald et al)
  compartment Seewald_et_al = 1 MWBUILTINPREFIX_pico_MWBUILTINUNIT_liter;
  // GSR-2003
  compartment GSR = 1 MWBUILTINPREFIX_pico_MWBUILTINUNIT_liter;

  // Species:
  species Ran_GTP_Seewald_et_al in Seewald_et_al = 1; Ran_GTP_Seewald_et_al is "Ran·GTP";  // substance in MWDERIVEDUNIT_micromolarity_picoliter
  // GSR 2003: 2uM
  species RanBP1_Seewald_et_al in Seewald_et_al = 2;  // substance in MWDERIVEDUNIT_micromolarity_picoliter
  species Ran_GTP_RanBP1_Seewald_et_al in Seewald_et_al = 0; Ran_GTP_RanBP1_Seewald_et_al is "Ran·GTP·RanBP1";  // substance in MWDERIVEDUNIT_micromolarity_picoliter
  species RanGAP_Seewald_et_al in Seewald_et_al = 0.7;  // substance in MWDERIVEDUNIT_micromolarity_picoliter
  species Ran_GDP_RanBP1 in Seewald_et_al = 0; Ran_GDP_RanBP1 is "Ran·GTP·RanBP1·RanGAP";  // substance in MWDERIVEDUNIT_micromolarity_picoliter
  species Ran_GDP_RanBP1 in Seewald_et_al = 0; Ran_GDP_RanBP1 is "Ran·GDP·RanBP1·RanGAP";  // substance in MWDERIVEDUNIT_micromolarity_picoliter
  species Ran_GDP_RanBP1 in Seewald_et_al = 0; Ran_GDP_RanBP1 is "Ran·GDP·RanBP1";  // substance in MWDERIVEDUNIT_micromolarity_picoliter
  species Ran_GDP_Seewald_et_al in Seewald_et_al = 0.1; Ran_GDP_Seewald_et_al is "Ran·GDP";  // substance in MWDERIVEDUNIT_micromolarity_picoliter
  species Ran_GTP_GSR in GSR = 1; Ran_GTP_GSR is "Ran·GTP";  // substance in MWDERIVEDUNIT_micromolarity_picoliter
  species Ran_GTP_RanBP1_GSR in GSR = 0; Ran_GTP_RanBP1_GSR is "Ran·GTP·RanBP1";  // substance in MWDERIVEDUNIT_micromolarity_picoliter
  species RanBP1_GSR in GSR = 2;  // substance in MWDERIVEDUNIT_micromolarity_picoliter
  species $RanGAP_GSR in GSR = 0.7;  // substance in MWDERIVEDUNIT_micromolarity_picoliter
  species Ran_GDP_GSR in GSR = 0.1; Ran_GDP_GSR is "Ran·GDP";  // substance in MWDERIVEDUNIT_micromolarity_picoliter

  // Parameters:
  k_on_rbp = 0.3 MWDERIVEDUNIT_1__micromolarity__second;
  resupply = 0 MWDERIVEDUNIT_micromolarity__second;
  k_resupply = 0.0001 MWDERIVEDUNIT_1__second___2;
  kf_1 = 1;
  kf_2 = 1;
  k_GAP_21 = 10.6 MWDERIVEDUNIT_1__second;
  K_GAP_22 = 0.7 MWBUILTINPREFIX_micro_MWBUILTINUNIT_molarity;
  k_GAP_23 = 10.8 MWDERIVEDUNIT_1__second; k_GAP_23 is "k_GAP'";
  K_GAP_24 = 0.1 MWBUILTINPREFIX_micro_MWBUILTINUNIT_molarity; K_GAP_24 is "K_GAP'";
  k_off_rbp = 0.0004 MWDERIVEDUNIT_1__second;

  // Reactions:
  R1: Ran_GTP_Seewald_et_al + RanBP1_Seewald_et_al -> Ran_GTP_RanBP1_Seewald_et_al; R1_kf*Ran_GTP_Seewald_et_al*RanBP1_Seewald_et_al*Seewald_et_al - R1_kr*Ran_GTP_RanBP1_Seewald_et_al*Seewald_et_al;
    R1_kf = 0.5 MWDERIVEDUNIT_1__micromolarity__second; R1_kr = 0.00043 MWDERIVEDUNIT_1__second;
  R2: Ran_GTP_RanBP1_Seewald_et_al + RanGAP_Seewald_et_al -> Ran_GDP_RanBP1; R2_kf*Ran_GTP_RanBP1_Seewald_et_al*RanGAP_Seewald_et_al*Seewald_et_al - R2_kr*Ran_GDP_RanBP1*Seewald_et_al;
    R2_kf = 450 MWDERIVEDUNIT_1__micromolarity__second; R2_kr = 900 MWDERIVEDUNIT_1__second;
  Hydrolysis: Ran_GDP_RanBP1 => Ran_GDP_RanBP1; Hydrolysis_kf*Ran_GDP_RanBP1*Seewald_et_al;
    Hydrolysis_kf = 10 MWDERIVEDUNIT_1__second;
  R4: Ran_GDP_RanBP1 + RanGAP_Seewald_et_al -> Ran_GDP_RanBP1; R4_kf*Ran_GDP_RanBP1*RanGAP_Seewald_et_al*Seewald_et_al - R4_kr*Ran_GDP_RanBP1*Seewald_et_al;
    R4_kf = 450 MWDERIVEDUNIT_1__micromolarity__second; R4_kr = 900 MWDERIVEDUNIT_1__second;
  // https://mcb.asm.org/content/mcb/23/22/8124/F13.large.jpg
  R3: Ran_GDP_Seewald_et_al + RanBP1_Seewald_et_al -> Ran_GDP_RanBP1; R3_kf*Ran_GDP_Seewald_et_al*RanBP1_Seewald_et_al*Seewald_et_al - R3_kr*Ran_GDP_RanBP1*Seewald_et_al;
    R3_kf = 0.008 MWDERIVEDUNIT_1__micromolarity__second; R3_kr = 0.05 MWDERIVEDUNIT_1__second;
  Reaction_6: Ran_GDP_Seewald_et_al => Ran_GTP_Seewald_et_al; resupply*Seewald_et_al;
  Reaction_1: Ran_GTP_GSR + RanBP1_GSR -> Ran_GTP_RanBP1_GSR; (k_on_rbp*Ran_GTP_GSR*RanBP1_GSR - k_off_rbp*Ran_GTP_RanBP1_GSR)*GSR;
  Reaction_2: Ran_GTP_GSR => Ran_GDP_GSR; k_GAP_21*RanGAP_GSR/(1 + K_GAP_22/Ran_GTP_GSR)*GSR;
  GAP: Ran_GTP_RanBP1_GSR => Ran_GDP_GSR + RanBP1_GSR; k_GAP_23*RanGAP_GSR/(1 + K_GAP_24/Ran_GTP_RanBP1_GSR)*GSR; GAP is "GAP'";

  // Unit definitions:
  unit MWBUILTINPREFIX_pico_MWBUILTINUNIT_liter = metre^3 * 1e-15 dimensionless; MWBUILTINPREFIX_pico_MWBUILTINUNIT_liter is "picoliter";
  unit MWBUILTINPREFIX_micro_MWBUILTINUNIT_molarity = mole * 1e-3 dimensionless / metre^3; MWBUILTINPREFIX_micro_MWBUILTINUNIT_molarity is "micromolarity";
  unit MWDERIVEDUNIT_micromolarity_picoliter = 1e-18 mole; MWDERIVEDUNIT_micromolarity_picoliter is "(micromolarity)*(picoliter)";
  unit MWDERIVEDUNIT_1__micromolarity__second = metre^3 * 1000 dimensionless / (mole * second); MWDERIVEDUNIT_1__micromolarity__second is "1/micromolarity/second";
  unit MWDERIVEDUNIT_micromolarity__second = mole * 1e-3 dimensionless / (metre^3 * second); MWDERIVEDUNIT_micromolarity__second is "micromolarity/second";
  unit MWDERIVEDUNIT_1__second___2 = dimensionless / second^2; MWDERIVEDUNIT_1__second___2 is "1/second^2";
  unit MWDERIVEDUNIT_1__second = dimensionless / second; MWDERIVEDUNIT_1__second is "1/second";
end
