// SBML level 2 version 4

model RanGAP_sequence__with__ImpB()
  // RanGAP_sequence__with__ImpB

  // Compartments:
  compartment sandbox = 1 MWBUILTINPREFIX_pico_MWBUILTINUNIT_liter;

  // Species:
  species Ran_GTP in sandbox = 0.25; Ran_GTP is "Ran·GTP";  // substance in MWDERIVEDUNIT_micromolarity_picoliter
  species ImpB in sandbox = 0;  // substance in MWDERIVEDUNIT_micromolarity_picoliter
  species RanGAP in sandbox = 0;  // substance in MWDERIVEDUNIT_micromolarity_picoliter
  species ImpB_Ran_GTP in sandbox = 0; ImpB_Ran_GTP is "ImpB·Ran·GTP";  // substance in MWDERIVEDUNIT_micromolarity_picoliter
  species RanBP1 in sandbox = 0.3;  // substance in MWDERIVEDUNIT_micromolarity_picoliter
  species ImpB_Ran_GTP_RanBP1 in sandbox = 0; ImpB_Ran_GTP_RanBP1 is "ImpB·Ran·GTP·RanBP1";  // substance in MWDERIVEDUNIT_micromolarity_picoliter
  species Ran_GTP_RanBP1 in sandbox = 0; Ran_GTP_RanBP1 is "Ran·GTP·RanBP1";  // substance in MWDERIVEDUNIT_micromolarity_picoliter
  // DECAY: ImpB + Rest
  species ImpB_Ran_GTP_RanBP1_RanGAP in sandbox = 0; ImpB_Ran_GTP_RanBP1_RanGAP is "ImpB·Ran·GTP·RanBP1·RanGAP";  // substance in MWDERIVEDUNIT_micromolarity_picoliter
  species Ran_GDP_RanBP1_RanGAP in sandbox = 0; Ran_GDP_RanBP1_RanGAP is "Ran·GDP·RanBP1·RanGAP";  // substance in MWDERIVEDUNIT_micromolarity_picoliter
  species Ran_GDP_RanBP1 in sandbox = 0; Ran_GDP_RanBP1 is "Ran·GDP·RanBP1";  // substance in MWDERIVEDUNIT_micromolarity_picoliter
  species Ran_GDP in sandbox = 0; Ran_GDP is "Ran·GDP";  // substance in MWDERIVEDUNIT_micromolarity_picoliter
  species Ran_GTP_RanBP1_RanGAP in sandbox = 0; Ran_GTP_RanBP1_RanGAP is "Ran·GTP·RanBP1·RanGAP";  // substance in MWDERIVEDUNIT_micromolarity_picoliter
  species Ran_GTP_RanGAP in sandbox = 0; Ran_GTP_RanGAP is "Ran·GTP·RanGAP";  // substance in MWDERIVEDUNIT_micromolarity_picoliter
  species Ran_GDP_RanGAP in sandbox = 0; Ran_GDP_RanGAP is "Ran·GDP·RanGAP";  // substance in MWDERIVEDUNIT_micromolarity_picoliter
  species ImpB_Ran_GTP_RanGAP in sandbox = 0; ImpB_Ran_GTP_RanGAP is "ImpB·Ran·GTP·RanGAP";  // substance in MWDERIVEDUNIT_micromolarity_picoliter

  // Parameters:
  kf1 = 450 MWDERIVEDUNIT_1__uM__s;
  kr1 = 900 MWDERIVEDUNIT_1__s;
  k_hydrolysis1 = 10 MWDERIVEDUNIT_1__s;
  Total_GTP has MWUSERUNIT_uM;
  k_on_impb = 0.02 MWDERIVEDUNIT_1__uM__s;
  k_hydrolysis0_ImpB = 0.001 MWDERIVEDUNIT_1__s;
  kf0 = 21 MWDERIVEDUNIT_1__uM__s;
  kr0 = 150 MWDERIVEDUNIT_1__s;
  k_hydrolysis0 = 7.9 MWDERIVEDUNIT_1__s;
  k_hydrolysis1_ImpB = 1 MWDERIVEDUNIT_1__s;

  // Assignment rules:
  Total_GTP := Ran_GTP + ImpB_Ran_GTP + Ran_GTP_RanBP1 + ImpB_Ran_GTP_RanBP1 + Ran_GTP_RanBP1_RanGAP + ImpB_Ran_GTP_RanBP1_RanGAP + ImpB_Ran_GTP_RanGAP + Ran_GTP_RanGAP;

  // Reactions:
  // same as "knockoff"
  ImpB_on_3: ImpB + Ran_GTP => ImpB_Ran_GTP; k_on_impb*ImpB*Ran_GTP*sandbox; ImpB_on_3 is "ImpB on 1";
  // (assumption)
  R2: ImpB_Ran_GTP + RanBP1 => Ran_GTP_RanBP1 + ImpB; R2_kf*ImpB_Ran_GTP*RanBP1*sandbox; R2 is "R1";
    R2_kf = 0.02 MWDERIVEDUNIT_1__uM__s;
  R2: Ran_GTP + RanBP1 => Ran_GTP_RanBP1; (R2_kf*Ran_GTP*RanBP1 - R2_kr*Ran_GTP_RanBP1)*sandbox; R2 is "R1'";
    R2_kf = 0.02 MWDERIVEDUNIT_1__uM__s; R2_kr = 0.00043 MWDERIVEDUNIT_1__s;
  // WILD GUESS for the constant try ON--OFF this
  Hydrolysis_RanBP1: ImpB_Ran_GTP_RanBP1_RanGAP => ImpB + Ran_GDP_RanBP1_RanGAP; k_hydrolysis1_ImpB*ImpB_Ran_GTP_RanBP1_RanGAP*sandbox; Hydrolysis_RanBP1 is "Hydrolysis (ImpB, RanBP1)";
  Reaction_3_2: Ran_GDP_RanBP1 + RanGAP -> Ran_GDP_RanBP1_RanGAP; (kf1*Ran_GDP_RanBP1*RanGAP - kr1*Ran_GDP_RanBP1_RanGAP)*sandbox; Reaction_3_2 is "RanGAP interaction 1";
  R2: Ran_GDP + RanBP1 => Ran_GDP_RanBP1; (R2_kf*Ran_GDP*RanBP1 - R2_kr*Ran_GDP_RanBP1)*sandbox;
    R2_kf = 0.008 MWDERIVEDUNIT_1__uM__s; R2_kr = 0.05 MWDERIVEDUNIT_1__s;
  Reaction_3_2: Ran_GTP_RanBP1 + RanGAP -> Ran_GTP_RanBP1_RanGAP; (kf1*Ran_GTP_RanBP1*RanGAP - kr1*Ran_GTP_RanBP1_RanGAP)*sandbox;
  Hydrolysis_RanBP1: Ran_GTP_RanBP1_RanGAP => Ran_GDP_RanBP1_RanGAP; k_hydrolysis1*Ran_GTP_RanBP1_RanGAP*sandbox; Hydrolysis_RanBP1 is "Hydrolysis (RanBP1)";
  // same as "knockoff"
  ImpB_on_3: ImpB + Ran_GTP_RanBP1_RanGAP => ImpB_Ran_GTP_RanBP1_RanGAP; k_on_impb*ImpB*Ran_GTP_RanBP1_RanGAP*sandbox;
  Reaction_2: Ran_GTP + RanGAP -> Ran_GTP_RanGAP; (kf0*Ran_GTP*RanGAP - kr0*Ran_GTP_RanGAP)*sandbox;
  Hydrolysis_ImpB: Ran_GTP_RanGAP => Ran_GDP_RanGAP; k_hydrolysis0*Ran_GTP_RanGAP*sandbox;
  // guesstimated constant
  Hydrolysis_ImpB: ImpB_Ran_GTP_RanGAP => ImpB + Ran_GDP_RanGAP; k_hydrolysis0_ImpB*ImpB_Ran_GTP_RanGAP*sandbox; Hydrolysis_ImpB is "Hydrolysis (ImpB)";
  // k_on and k_off guesstimated such that KD = 100 uM
  RanGAP_interaction_0: Ran_GDP + RanGAP -> Ran_GDP_RanGAP; (k_on*Ran_GDP*RanGAP - kr_off*Ran_GDP_RanGAP)*sandbox;
    k_on = 10 MWDERIVEDUNIT_1__uM__s; kr_off = 1000 MWDERIVEDUNIT_1__s;

  // Events:
  Dilution: at (time >= 7200): sandbox = sandbox*10;
  Add_RanGAP: at (time >= 10000): RanGAP = 0.02;

  // Unit definitions:
  unit MWBUILTINPREFIX_pico_MWBUILTINUNIT_liter = metre^3 * 1e-15 dimensionless; MWBUILTINPREFIX_pico_MWBUILTINUNIT_liter is "picoliter";
  unit MWBUILTINPREFIX_micro_MWBUILTINUNIT_molarity = mole * 1e-3 dimensionless / metre^3; MWBUILTINPREFIX_micro_MWBUILTINUNIT_molarity is "micromolarity";
  unit MWDERIVEDUNIT_micromolarity_picoliter = 1e-18 mole; MWDERIVEDUNIT_micromolarity_picoliter is "(micromolarity)*(picoliter)";
  unit MWDERIVEDUNIT_1__uM__s = metre^3 * 1000 dimensionless / (mole * second); MWDERIVEDUNIT_1__uM__s is "1/uM/s";
  unit MWDERIVEDUNIT_1__s = dimensionless / second; MWDERIVEDUNIT_1__s is "1/s";
  unit MWUSERUNIT_uM = mole * 1e-3 dimensionless / metre^3;
end
