// SBML level 2 version 4

model IBB_ImpB_rearrangement()
  // IBB_ImpB_rearrangement

  // Compartments:
  compartment sandbox = 1 MWBUILTINPREFIX_pico_MWBUILTINUNIT_liter;

  // Species:
  species IBB_ImpB_sandbox_2 in sandbox = 0; IBB_ImpB_sandbox_2 is "IBB·ImpB";  // substance in mole
  species IBB in sandbox = 2e-12;  // substance in mole
  species ImpB in sandbox = 1e-12;  // substance in mole
  species IBB_ImpB_sandbox_5 in sandbox = 0; IBB_ImpB_sandbox_5 is "IBB*·ImpB";  // substance in mole
  species IBB in sandbox = 2e-12; IBB is "IBB'";  // substance in mole
  species ImpB in sandbox = 1e-12; ImpB is "ImpB'";  // substance in mole
  species IBB_ImpB_sandbox_5 in sandbox = 0; IBB_ImpB_sandbox_5 is "IBB·ImpB'";  // substance in mole

  // Parameters:
  // Catimel et al 2001, Table I, k_a1 = 0.11e6 / Ms
  k_a1 = 0.11 MWDERIVEDUNIT_1__micromolarity__second;
  // Catimel et al 2001, Table I, k_d1
  k_d1 = 0.024 MWDERIVEDUNIT_1__second;
  // Catimel et al 2001, Table I
  k_a2 = 0.024 MWDERIVEDUNIT_1__second;
  // Catimel et al 2001, Table I
  k_d2 = 0.00074 MWDERIVEDUNIT_1__second;
  k_d_eff has MWDERIVEDUNIT_1__second;

  // Assignment rules:
  k_d_eff := k_d1*(k_d2/(k_a2 + k_d2));

  // Reactions:
  Loading_1: IBB + ImpB -> IBB_ImpB_sandbox_2; (k_a1*IBB*ImpB - k_d1*IBB_ImpB_sandbox_2)*sandbox;
  Reaction_4_2: IBB_ImpB_sandbox_2 -> IBB_ImpB_sandbox_5; (k_a2*IBB_ImpB_sandbox_2 - k_d2*IBB_ImpB_sandbox_5)*sandbox;
  Loading_1: IBB + ImpB -> IBB_ImpB_sandbox_5; (k_a1*IBB*ImpB - k_d_eff*IBB_ImpB_sandbox_5)*sandbox;

  // Unit definitions:
  unit MWBUILTINPREFIX_pico_MWBUILTINUNIT_liter = metre^3 * 1e-15 dimensionless; MWBUILTINPREFIX_pico_MWBUILTINUNIT_liter is "picoliter";
  unit MWBUILTINUNIT_liter = metre^3 * 1e-3 dimensionless;
  unit MWDERIVEDUNIT_1__micromolarity__second = metre^3 * 1000 dimensionless / (mole * second); MWDERIVEDUNIT_1__micromolarity__second is "1/micromolarity/second";
  unit MWDERIVEDUNIT_1__second = dimensionless / second; MWDERIVEDUNIT_1__second is "1/second";
end
